# -*- coding: utf-8 -*-
# units: mm, kg, s
import Sofa

import os
path = os.path.dirname(os.path.abspath(__file__))+'/mesh/'

def createScene(rootNode):
        rootNode.createObject('RequiredPlugin',name='BeamAdapter', pluginName='BeamAdapter')
        rootNode.createObject('RequiredPlugin',name='SofaShells', pluginName='SofaShells')
        rootNode.createObject('RequiredPlugin',name='SoftRobots', pluginName='SoftRobots')
        rootNode.createObject('RequiredPlugin',name='SofaPython', pluginName='SofaPython')
        rootNode.findData('dt').value=0.01
        rootNode.findData('gravity').value='0 0 0'
        rootNode.createObject('VisualStyle', displayFlags='showVisualModels hideBehaviorModels showCollisionModels hideMappings hideForceFields showInteractionForceFields hideWireframe')
        rootNode.createObject('FreeMotionAnimationLoop')
        rootNode.createObject('GenericConstraintSolver', tolerance="1e-3", maxIterations="5000", unbuilt="false")
        rootNode.createObject('CollisionPipeline', depth="6", verbose="0", draw="1")
        rootNode.createObject('BruteForceDetection', name="N2")
        rootNode.createObject('CollisionResponse', response="FrictionContact", responseParams="mu=0.65")
        rootNode.createObject('LocalMinDistance', name="Proximity", alarmDistance="0.6", contactDistance="0.44", angleCone="0.01")


        cochleaNode = rootNode.createChild('cochleaNode')
        cochleaNode.createObject('MeshObjLoader', name='loader', filename='Mesh/cochleeCompleteTroueeSimpleOrientationMegaTrou.obj', flipNormals="false")
        cochleaNode.createObject('MeshTopology',src = '@loader')
        cochleaNode.createObject('MechanicalObject', name='dofs', template='Vec3d', showIndices='false', showIndicesScale='4e-5', rx='0',printLog="0")
        cochleaNode.createObject('TriangleCollisionModel', group='1')
        cochleaNode.createObject('LineCollisionModel', group='1')
        cochleaNode.createObject('PointCollisionModel', group='1')
        visuCochleaNode = cochleaNode.createChild('visuCochleaNode')
        visuCochleaNode.createObject('OglModel', name="VisualModel", color="3.0 0.5 0.0 0.9")

        membraneNode = rootNode.createChild('membraneNode')
        membraneNode.createObject('EulerImplicitSolver', rayleighStiffness='0.0', rayleighMass='0.0')
        membraneNode.createObject('SparseLDLSolver')
        membraneNode.createObject('MeshObjLoader', name='loader', filename='Mesh/membraneBasilaireBetterFit.obj', flipNormals="false")
        membraneNode.createObject('Vertex2Frame', name="frames", template="Rigid3d.", position="@loader.position", normals="@loader.normals", invertNormals="false")
        #membraneNode.createObject('Mesh',src ='@loader')
        membraneNode.createObject('MechanicalObject', name='MO', template="Rigid3d", position="@frames.frames", showIndices="false", showIndicesScale="0.000005")
        membraneNode.createObject('TriangleSetTopologyContainer', name="coarseTopo", src="@loader")

        membraneNode.createObject('UniformMass', showAxisSizeFactor="0.1", totalMass="0.001")
        membraneNode.createObject('TriangularShellForceField', name="FEM", youngModulus="1e4", poissonRatio="0.33", rayleighStiffness="0", thickness="4.0e-1", measure="Strain (norm)")
        membraneNode.createObject('RestShapeSpringsForceField', points="7 8 10 11 12 13 14 19 20 22 23 35 36 51 52 53 56 57 58 60 61 62 64 67 80 81 82 83 89 90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", stiffness="1000000", angularStiffness="100000")
        membraneNode.createObject('LinearSolverConstraintCorrection')

        collMembraneNode = membraneNode.createChild('collMembraneNode')
        collMembraneNode.createObject('MechanicalObject', name="Coll_MO", template="Vec3d", src="@../loader")
        collMembraneNode.createObject('TriangleCollisionModel', bothSide="1", group='1')
        collMembraneNode.createObject('LineCollisionModel', bothSide="1", group='1')
        collMembraneNode.createObject('PointCollisionModel', bothSide="1", group='1')
        collMembraneNode.createObject('IdentityMapping', input="@../MO", output="@Coll_MO")

        visuMembraneNode = membraneNode.createChild('visuMembraneNode')
        visuMembraneNode.createObject('OglModel', name="Visual", color="red")

        topoLines_cath = rootNode.createChild('topoLines_cath')
        topoLines_cath.createObject('WireRestShape', template="Rigid3d", printLog="true", name="catheterRestShape", length="20", straightLength="20", spireDiameter="0", spireHeight="0.0", densityOfBeams="40", numEdges="20", numEdgesCollis="20", youngModulus="2.5e5", youngModulusExtremity="2.5e5", radius="@../Proximity.contactDistance")
        topoLines_cath.createObject('EdgeSetTopologyContainer', name="meshLinesCath")
        topoLines_cath.createObject('EdgeSetTopologyModifier', name="Modifier")
        topoLines_cath.createObject('EdgeSetTopologyAlgorithms', name="TopoAlgo", template="Rigid3d")
        topoLines_cath.createObject('EdgeSetGeometryAlgorithms', name="GeomAlgo", template="Rigid3d")
        topoLines_cath.createObject('MechanicalObject', template="Rigid3d", name="dofTopo1")

        RefStartingPos = rootNode.createChild('RefStartingPos')
        RefStartingPos.createObject('MechanicalObject', name="ReferencePos", template="Rigid3d", position="-3 1.5 0.3  1 0 0 0")

        InstrumentCombined = rootNode.createChild('InstrumentCombined')
        InstrumentCombined.createObject('EulerImplicitSolver', rayleighStiffness="0.01", rayleighMass="0.03", printLog="false" )
        InstrumentCombined.createObject('BTDLinearSolver')
        InstrumentCombined.createObject('RegularGridTopology', name="meshLinesCombined", nx="100", ny="1", nz="1")

        InstrumentCombined.createObject('MechanicalObject', template="Rigid3d", name="DOFs" )
        InstrumentCombined.createObject('InterventionalRadiologyController', template="Rigid3d", name="m_ircontroller", printLog="true", xtip="0.1",speed ='4',   step="0.1", rotationInstrument="0", controlledInstrument="0", startingPos="@../RefStartingPos/ReferencePos.position", instruments="InterpolCatheter")
        InstrumentCombined.createObject('WireBeamInterpolation', name="InterpolCatheter", WireRestShape="@../topoLines_cath/catheterRestShape", radius="3.0", printLog="false")
        InstrumentCombined.createObject('AdaptiveBeamForceFieldAndMass', name="CatheterForceField", massDensity="0.000005", interpolation="@InterpolCatheter", printLog="false")
	InstrumentCombined.createObject('LinearSolverConstraintCorrection', printLog="false", wire_optimization="true")
	InstrumentCombined.createObject("FixedConstraint", indices="0")
	InstrumentCombined.createObject('RestShapeSpringsForceField', name="MeasurementFF", points="@m_ircontroller.indexFirstNode",  stiffness="1e10", recompute_indices="1", angularStiffness="1e10", external_rest_shape="@../RefStartingPos/ReferencePos", external_points="0", drawSpring="1", springColor="1 0 0 1")

	CollisInstrumentCombined = InstrumentCombined.createChild('CollisInstrumentCombined')
	CollisInstrumentCombined.createObject('EdgeSetTopologyContainer', name="collisEdgeSet")
	CollisInstrumentCombined.createObject('EdgeSetTopologyModifier', name="colliseEdgeModifier")
	CollisInstrumentCombined.createObject('MechanicalObject', name="CollisionDOFs")
	CollisInstrumentCombined.createObject('MultiAdaptiveBeamMapping', name="multimapp", ircontroller="../m_ircontroller", useCurvAbs="1", printLog="false")
	CollisInstrumentCombined.createObject('LineCollisionModel', selfCollision="1", LineActiverPath="../m_ircontroller")
	CollisInstrumentCombined.createObject('PointCollisionModel', selfCollision="1", PointActiverPath="../m_ircontroller")

        visuInstrumentCombined = InstrumentCombined.createChild('visuInstrumentCombined')
        visuInstrumentCombined.createObject('MechanicalObject', name="Quads")
        visuInstrumentCombined.createObject('QuadSetTopologyContainer', name="ContainerCath")
        visuInstrumentCombined.createObject('QuadSetTopologyModifier', name="Modifier" )
        visuInstrumentCombined.createObject('QuadSetTopologyAlgorithms', name="TopoAlgo", template="Vec3d")
        visuInstrumentCombined.createObject('QuadSetGeometryAlgorithms', name="GeomAlgo", template="Vec3d")
        visuInstrumentCombined.createObject('Edge2QuadTopologicalMapping', nbPointsOnEachCircle="10", radius="@../../Proximity.contactDistance", input="@../../topoLines_cath/meshLinesCath", output="@ContainerCath", flipNormals="true",printLog="1")
        visuInstrumentCombined.createObject('AdaptiveBeamMapping', name="VisuMapCath", useCurvAbs="1", printLog="1", isMechanical="false",  interpolation="@../InterpolCatheter")


        realVisuInstrumentCombined = visuInstrumentCombined.createChild('realVisuInstrumentCombined')
        realVisuInstrumentCombined.createObject('OglModel',name="VisualCathOGL", src="@../ContainerCath", color='white')
        realVisuInstrumentCombined.createObject('IdentityMapping', input="@../Quads", output="@VisualCathOGL")
        return rootNode
